V1 := [-22.36; -4.07; -36.49]
V2 := [-17.61; -16.89; 1.88]
VecMul := V1×V2 = [-623.968; 684.626; 305.988]
ScalMul := V1*V2 = 393.901
ModV1 := |V1| = 42.989
ModV2 := |V2| = 24.4728
Cos := V1*V2/(|V1|*|V2|) = 0.374408
PView := [-2.12; -16.61; -10.15]
R[0] := PView[0]*cos(PView[1])*sin(PView[2])
R[1] := PView[0]*sin(PView[1])*sin(PView[2])
R[2] := PView[0]*cos(PView[2])
R = [0.871862; -1.10329; 1.58651]
