A := [21.53, 14.67, -0.18; 8.54, -7.89, -14.71; 11.96, -8.05, 25.62]
B := [7.90, 21.51, -17.46; 22.07, 1.05, -1.05; 27.45, 1.54, -0.87]
V1 := [-22.36; -4.07; -36.49]
V2 := [-17.61; -16.89; 1.88]
C1 := A + B = [29.43, 36.18, -17.64; 30.61, -6.84, -15.76; 39.41, -6.51, 24.75]
С2 := A*B = [488.913, 478.237, -391.161; -510.456, 152.757, -128.026; 620.09, 288.262, -222.659]
D := A*V1 = [-534.549; 377.926; -1169.54]
q := transpose(V1)*V2 = 393.901
p := transpose(V1)*A*V2 = 15174.2
