# Координаты вершин в МСК:
Xa := -2
Xb := -3
Xc := 0
Xd := 3
Xe := 2
Xf := -2
Xg := 2
Ya := -4
Yb := 0
Yc := 4
Yd := 0
Ye := -4
Yf := 0
Yg := 0
Xlw := 100
Ylw := 200
Xhw := 400
Yhw := 500
Zx := transpose([Xa, Xb, Xc, Xd, Xe, Xf, Xg])
Zy := transpose([Ya, Yb, Yc, Yd, Ye, Yf, Yg])
Xl := min(Zx) = -3
Yh := max(Zy) = 4
Xh := max(Zx) = 3
Yl := min(Zy) = -4
dXw := Xhw - Xlw = 300
dX := Xh - Xl = 6
dYw := Yhw - Ylw = 300
dY := Yh - Yl = 8
Kx := dXw/dX = 50
Ky := dYw/dY = 37.5
Tsw := [Kx, 0, Xlw - Kx*Xl; 0, -Ky, Yhw + Ky*Yl; 0, 0, 1] = [50, 0, 250; 0, -37.5, 350; 0, 0, 1]
[Xaw; Yaw; q] := Tsw*[Xa; Ya; 1] = [150; 500; 1]  # - вершина А
[Xcw; Ycw; q] := Tsw*[Xc; Yc; 1] = [250; 200; 1]  # - вершина C
[Xbw; Ybw; q] := Tsw*[Xb; Yb; 1] = [100; 350; 1]  # - вершина В
[Xdw; Ydw; q] := Tsw*[Xd; Yd; 1] = [400; 350; 1]  # - вершина D
[Xew; Yew; q] := Tsw*[Xe; Ye; 1] = [350; 500; 1]  # - вершина E
[Xgw; Ygw; q] := Tsw*[Xg; Yg; 1] = [350; 350; 1]  # - вершина G
[Xfw; Yfw; q] := Tsw*[Xf; Yf; 1] = [150; 350; 1]  # - вершина F
X := transpose([Xb, Xc, Xd, Xb, Xf, Xa, Xe, Xg, Xd])
Xw := transpose([Xbw, Xcw, Xdw, Xbw, Xfw, Xaw, Xew, Xgw, Xdw])
Yw := transpose([Ybw, Ycw, Ydw, Ybw, Yfw, Yaw, Yew, Ygw, Ydw])
Y := transpose([Yb, Yc, Yd, Yb, Yf, Ya, Ye, Yg, Yd])
# В мировой СК | В оконной СК
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